Thu 07/06/2023
12:10 PM
$PROB Zolpidem PK
;; 1 Depot - 1 Comp
;; ETA (VC,CL) : Dependent

$INPUT ID TIME AMT RATE=DROP DV MDV EVID CMT DVID SEX WT

$DATA ..//PK_Zolpidem_30_1D.csv IGNORE=@

$SUBROUTINES ADVAN14 TOL=9

$MODEL

 COMP(Depot1, DEFDOSE)
 COMP(Central, DEFOBS)

$PK

 KA     = THETA(1)*EXP(ETA(1))
 VC     = THETA(2)*EXP(ETA(2))
 CL     = THETA(3)*EXP(ETA(3))

 ALAG1  = THETA(4)

 K      = CL/VC

 S2     = VC/1000

$DES

 DADT(1) = -KA*A(1)
 DADT(2) = KA*A(1) - K*A(2)

$ERROR
  IPRED   = F
  W       = SQRT(THETA(5)**2 + THETA(6)**2 * IPRED**2)
  IRES    = DV - IPRED
  IWRES   = IRES / W
  Y       = IPRED + W * EPS(1)

$THETA
  (0, 3)          ;1, KA
  (0, 100)        ;2, VC
  (0, 5)          ;3, CL
  (0, 0.2)        ;4, ALAG1

   0.000001 FIX   ;5, Additive Residual Variability
  (0, 0.05)       ;6, Proportional Residual Variability

$OMEGA
  0.1        ;1, KA

$OMEGA BLOCK(2)
  0.02       ;2, VC
  0.01 0.1   ;3, CL

$SIGMA 1 FIX

$ESTIMATION PRINT=2 MAXEVALS=9999 METHOD=COND INTER SLOW NOABORT MSFO=ZPD_101101E01.MSF
            NOTHETABOUNDTEST NOOMEGABOUNDTEST NOSIGMABOUNDTEST
$COVARIANCE PRINT=E MATRIX=S
$TABLE ID TIME MDV IPRED CWRES NPDE DVID
       FILE=ZPD_101101E01.FIT NOPRINT ONEHEADER
$TABLE ID ETAS(1:LAST) SEX WT
       FILE=ZPD_101101E01.PAR NOPRINT ONEHEADER FIRSTONLY NOAPPEND
$TABLE ID KA VC CL ALAG1 SEX
       FILE=ZPD_101101E01.IPK NOPRINT ONEHEADER NOAPPEND FIRSTONLY

NM-TRAN MESSAGES
 WARNINGS AND ERRORS (IF ANY) FOR PROBLEM    1
 (WARNING  2) NM-TRAN INFERS THAT THE DATA ARE POPULATION.
 (DATA WARNING   2) RECORD         1, DATA ITEM   9, CONTENTS:
 THE NUMBER OF DATA ITEMS SPECIFIED IN $INPUT EXCEEDS THE NUMBER OF VALUES
 IN A RECORD OF THE NM-TRAN DATA FILE. NULLS WERE SUPPLIED FOR MISSING
 VALUES, STARTING WITH THE ABOVE NUMBERED DATA ITEM.
 (DATA WARNING   2) RECORD         2, DATA ITEM   9, CONTENTS:
 THE NUMBER OF DATA ITEMS SPECIFIED IN $INPUT EXCEEDS THE NUMBER OF VALUES
 IN A RECORD OF THE NM-TRAN DATA FILE. NULLS WERE SUPPLIED FOR MISSING
 VALUES, STARTING WITH THE ABOVE NUMBERED DATA ITEM.
 * THE MAXIMUM NUMBER OF WARNINGS OF ONE OR MORE TYPES WAS REACHED.
 IT IS POSSIBLE THAT SOME WARNING MESSAGES WERE SUPPRESSED.
Note: Analytical 2nd Derivatives are constructed in FSUBS but are never used.
      You may insert $ABBR DERIV2=NO after the first $PROB to save FSUBS construction and compilation time
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
1NONLINEAR MIXED EFFECTS MODEL PROGRAM (NONMEM) VERSION 7.5.1
 ORIGINALLY DEVELOPED BY STUART BEAL, LEWIS SHEINER, AND ALISON BOECKMANN
 CURRENT DEVELOPERS ARE ROBERT BAUER, ICON DEVELOPMENT SOLUTIONS,
 AND ALISON BOECKMANN. IMPLEMENTATION, EFFICIENCY, AND STANDARDIZATION
 PERFORMED BY NOUS INFOSYSTEMS.
 PROBLEM NO.:         1
 Zolpidem PK
 TOT. NO. OF OBS RECS:      355
 TOT. NO. OF INDIVIDUALS:       30
 GENERAL NONLINEAR KINETICS MODEL WITH STIFF/NONSTIFF EQUATIONS (CVODES, ADVAN14)
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 #TBLN:      1
 #METH: First Order Conditional Estimation with Interaction
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
 #TERM:
0MINIMIZATION SUCCESSFUL
 HOWEVER, PROBLEMS OCCURRED WITH THE MINIMIZATION.
 REGARD THE RESULTS OF THE ESTIMATION STEP CAREFULLY, AND ACCEPT THEM ONLY
 AFTER CHECKING THAT THE COVARIANCE STEP PRODUCES REASONABLE OUTPUT.
 NO. OF FUNCTION EVALUATIONS USED:      422
 NO. OF SIG. DIGITS IN FINAL EST.:  3.4

 ETABAR IS THE ARITHMETIC MEAN OF THE ETA-ESTIMATES,
 AND THE P-VALUE IS GIVEN FOR THE NULL HYPOTHESIS THAT THE TRUE MEAN IS 0.

 ETABAR:        -1.1182E-01 -4.4908E-03  2.8489E-04
 SE:             3.1276E-01  4.1907E-02  7.5173E-02
 N:                      30          30          30

 P VAL.:         7.2071E-01  9.1466E-01  9.9698E-01

 ETASHRINKSD(%)  9.3333E+00  5.2955E+00  1.1250E+00
 ETASHRINKVR(%)  1.7795E+01  1.0311E+01  2.2373E+00
 EBVSHRINKSD(%)  6.5214E+00  5.8478E+00  1.1892E+00
 EBVSHRINKVR(%)  1.2618E+01  1.1354E+01  2.3643E+00
 RELATIVEINF(%)  8.7236E+01  6.2665E+01  1.0000E+02
 EPSSHRINKSD(%)  1.4815E+01
 EPSSHRINKVR(%)  2.7435E+01


 TOTAL DATA POINTS NORMALLY DISTRIBUTED (N):          355
 N*LOG(2PI) CONSTANT TO OBJECTIVE FUNCTION:    652.44635857531762
 OBJECTIVE FUNCTION VALUE WITHOUT CONSTANT:    1309.9527114392874
 OBJECTIVE FUNCTION VALUE WITH CONSTANT:       1962.3990700146051
 REPORTED OBJECTIVE FUNCTION DOES NOT CONTAIN CONSTANT

 TOTAL EFFECTIVE ETAS (NIND*NETA):                            90


 #TERE:
 Elapsed estimation  time in seconds:   678.20
 Elapsed covariance  time in seconds:    19.95
 Elapsed postprocess time in seconds:     4.43

 ********************               FIRST ORDER CONDITIONAL ESTIMATION WITH INTERACTION              ********************
 #OBJT:**************                       MINIMUM VALUE OF OBJECTIVE FUNCTION                      ********************
 #OBJV:********************************************     1309.953       **************************************************

 ********************               FIRST ORDER CONDITIONAL ESTIMATION WITH INTERACTION              ********************
 ********************                             FINAL PARAMETER ESTIMATE                           ********************

 THETA - VECTOR OF FIXED EFFECTS PARAMETERS   *********
         TH 1      TH 2      TH 3      TH 4      TH 5      TH 6
         2.07E+01  6.44E+01  1.79E+01  2.43E-01  1.00E-06  2.12E-01

 OMEGA - COV MATRIX FOR RANDOM EFFECTS - ETAS  ********
         ETA1      ETA2      ETA3
 ETA1
+        3.57E+00
 ETA2
+        0.00E+00  5.87E-02
 ETA3
+        0.00E+00  8.94E-02  1.73E-01

 SIGMA - COV MATRIX FOR RANDOM EFFECTS - EPSILONS  ****
         EPS1
 EPS1
+        1.00E+00

 OMEGA - CORR MATRIX FOR RANDOM EFFECTS - ETAS  *******
         ETA1      ETA2      ETA3
 ETA1
+        1.89E+00
 ETA2
+        0.00E+00  2.42E-01
 ETA3
+        0.00E+00  8.86E-01  4.16E-01

 SIGMA - CORR MATRIX FOR RANDOM EFFECTS - EPSILONS  ***
         EPS1
 EPS1
+        1.00E+00

 ********************               FIRST ORDER CONDITIONAL ESTIMATION WITH INTERACTION              ********************
 ********************                            STANDARD ERROR OF ESTIMATE                          ********************

 THETA - VECTOR OF FIXED EFFECTS PARAMETERS   *********
         TH 1      TH 2      TH 3      TH 4      TH 5      TH 6
         8.84E+00  3.33E+00  1.56E+00  7.66E-04 .........  7.72E-03

 OMEGA - COV MATRIX FOR RANDOM EFFECTS - ETAS  ********
         ETA1      ETA2      ETA3
 ETA1
+        1.29E+00
 ETA2
+       .........  2.43E-02
 ETA3
+       .........  3.63E-02  6.72E-02

 SIGMA - COV MATRIX FOR RANDOM EFFECTS - EPSILONS  ****
         EPS1
 EPS1
+       .........

 OMEGA - CORR MATRIX FOR RANDOM EFFECTS - ETAS  *******
         ETA1      ETA2      ETA3
 ETA1
+        3.42E-01
 ETA2
+       .........  5.02E-02
 ETA3
+       .........  6.76E-02  8.07E-02

 SIGMA - CORR MATRIX FOR RANDOM EFFECTS - EPSILONS  ***
         EPS1
 EPS1
+       .........

 ********************               FIRST ORDER CONDITIONAL ESTIMATION WITH INTERACTION              ********************
 ********************                          COVARIANCE MATRIX OF ESTIMATE                         ********************

            TH 1      TH 2      TH 3      TH 4      TH 5      TH 6      OM11      OM12      OM13      OM22      OM23      OM33
             SG11
 TH 1
+        7.82E+01
 TH 2
+        4.23E+00  1.11E+01
 TH 3
+       -5.38E-02  4.26E+00  2.45E+00
 TH 4
+        1.71E-03  3.67E-04  9.47E-07  5.87E-07
 TH 5
+       ......... ......... ......... ......... .........
 TH 6
+        1.89E-02 -3.31E-03 -1.75E-03  1.60E-06 .........  5.95E-05
 OM11
+       -3.04E+00  8.40E-01  4.15E-01  8.34E-05 ......... -2.29E-03  1.67E+00
 OM12
+       ......... ......... ......... ......... ......... ......... ......... .........
 OM13
+       ......... ......... ......... ......... ......... ......... ......... ......... .........
 OM22
+       -1.68E-02  2.19E-02  1.05E-02  3.08E-06 ......... -7.87E-05  9.91E-03 ......... .........  5.93E-04
 OM23
+        8.59E-03  2.61E-02  1.20E-02  2.85E-06 ......... -1.14E-04  9.86E-03 ......... .........  7.91E-04  1.32E-03
 OM33
+        3.66E-02  4.14E-02  2.54E-02  8.79E-07 ......... -2.02E-04  1.58E-02 ......... .........  1.22E-03  2.31E-03  4.52E-03
 SG11
+       ......... ......... ......... ......... ......... ......... ......... ......... ......... ......... ......... .........
         .........

 ********************               FIRST ORDER CONDITIONAL ESTIMATION WITH INTERACTION              ********************
 ********************                          CORRELATION MATRIX OF ESTIMATE                        ********************

            TH 1      TH 2      TH 3      TH 4      TH 5      TH 6      OM11      OM12      OM13      OM22      OM23      OM33
             SG11
 TH 1
+        8.84E+00
 TH 2
+        1.44E-01  3.33E+00
 TH 3
+       -3.89E-03  8.20E-01  1.56E+00
 TH 4
+        2.53E-01  1.44E-01  7.91E-04  7.66E-04
 TH 5
+       ......... ......... ......... ......... .........
 TH 6
+        2.78E-01 -1.29E-01 -1.45E-01  2.71E-01 .........  7.72E-03
 OM11
+       -2.66E-01  1.95E-01  2.05E-01  8.42E-02 ......... -2.29E-01  1.29E+00
 OM12
+       ......... ......... ......... ......... ......... ......... ......... .........
 OM13
+       ......... ......... ......... ......... ......... ......... ......... ......... .........
 OM22
+       -7.79E-02  2.71E-01  2.75E-01  1.65E-01 ......... -4.19E-01  3.15E-01 ......... .........  2.43E-02
 OM23
+        2.68E-02  2.17E-01  2.11E-01  1.03E-01 ......... -4.08E-01  2.10E-01 ......... .........  8.95E-01  3.63E-02
 OM33
+        6.15E-02  1.85E-01  2.42E-01  1.71E-02 ......... -3.89E-01  1.82E-01 ......... .........  7.46E-01  9.45E-01  6.72E-02
 SG11
+       ......... ......... ......... ......... ......... ......... ......... ......... ......... ......... ......... .........
         .........
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
 ********************               FIRST ORDER CONDITIONAL ESTIMATION WITH INTERACTION              ********************
 ********************                      EIGENVALUES OF COR MATRIX OF ESTIMATE                     ********************

             1         2         3         4         5         6         7         8         9
         1.01E-02  1.52E-01  2.15E-01  5.29E-01  5.74E-01  1.03E+00  1.46E+00  1.66E+00  3.36E+00
 Elapsed finaloutput time in seconds:     0.03
 #CPUT: Total CPU Time in Seconds,      320.625
